R1 := 13000
R2 := 19000
h(t) := 0.594*(1 - e^(-1295.5*t))
C2 := 0.1*10^-6
# [plot: h(t) vs t]
Ku(w) := R2/sqrt(((R1 + R2)^2 + (w*R1*R2*C2)^2))
# [plot: Ku(w) vs w]
φ(w) := -atan(w*R1*R2*C2/(R1 + R2))*180/π
Um := 25
# [plot: φ(w) vs w]
T := 6*10^-6
q := 1.5
n := 100
uvh(t) := Um/q + (2*Um/q)*sum(sin(k*π/q)/(k*π/q)*cos(2*π*k*t/T), k = 1 .. n)
uvih(t) := Ku(0)*Um/q + (2*Um/q)*sum((sin(k*π/q)/(k*π/q))*Ku(2*k*π/T)*cos(2*k*π*t/T + φ(2*π*k/T)), k = 1 .. n)
# [plot: uvh(t), uvih(t) vs t]
