f_c := 400
U_m := 7.07
thr := 2.274
R_н := 6
u_in(t) := U_m*sin(2*π*f_c*t)
u_tmp(t) := U_m*|sin(2*π*f_c*t)| - thr
u_rect(t) := (u_tmp(t) + |u_tmp(t)|)/2
i_out(t) := u_rect(t)/R_н
u_vih(x) := (|x| - thr + ||x| - thr|)/2
# [plot: i_out(t) vs t]
